OpenVSP model (file version 5), 1 components.
Geometry view with OpenVSP parameter names; values to 6 digits, angles in degrees, lengths in the model's unit.
Overall bounding box: X_Min=-5.92091e-05 X_Len=2.31448 Y_Min=-5.03805 Y_Len=10.0761 Z_Min=-0.084648 Z_Len=0.470984

Wing "FW_DEMO_01"
  location (X Y Z) 0 0 0, rotation 0 0 0
  symmetric about XZ
  bounding box size 2.31448 10.0761 0.470984
  totals: TotalSpan=10 TotalProjectedSpan=9.97656 TotalChord=1.5 TotalArea=15.5 TotalAR=6.4214 MAC=1.60202
  root: chord 2, twist 1, NACA 4-series Camber=0.02 CamberLoc=0.4 ThickChord=0.12
  sections:
    n  Span  Root_Chord  Tip_Chord  Area  Sweep  Sweep_Location  Dihedral  Twist  Twist_Location  tip airfoil
    1  3     2           1.5        5.25  10     0.25            3         -1     0.25            NACA 4-series Camber=0.01 CamberLoc=0.4 ThickChord=0.11
    2  2     1.5         1          2.5   15     0.25            5         -2     0.25            NACA 4-series Camber=0 CamberLoc=0.4 ThickChord=0.1
